*Heading
** Job name: Job-unmodified Model name: Model-1
** Generated by: Abaqus/CAE 2023
*Preprint, echo=NO, model=NO, history=NO, contact=NO
**
** PARTS
**
*Part, name=Part-1
*End Part
**
**
** ASSEMBLY
**
*Assembly, name=Assembly
**
*Instance, name=Part-1-1, part=Part-1
*Node
      1,  0.200000003, -0.0675000027, 0.00499999989
      2,  0.209999993, -0.0675000027, 0.00499999989
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*Element, type=C3D8
 1,    54,   745, 13653,   727,     1,    29,   721,    36
 2,   745,   746, 13654, 13653,    29,    30,   722,   721
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*Nset, nset=Set-1
     1,     4,     7,     8,     9,    12
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*Elset, elset=Set-1, generate
   161,  12960,      1
*Nset, nset=Set-2
     1,     2,     3,     4,     5,     6
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*Elset, elset=Set-2, generate
   1,  160,    1
** Section: Hinge
*Solid Section, elset=Set-2, material=Alu
,
** Section: Panel
*Solid Section, elset=Set-1, material=Acrylic
,
*End Instance
**
*Nset, nset=Set-1, instance=Part-1-1
   2,   3,   5,   6,  10,  11
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*Elset, elset=Set-1, instance=Part-1-1, generate
   4,  160,    4
*Nset, nset=Set-2, instance=Part-1-1
 17, 22
*End Assembly
**
** MATERIALS
**
*Material, name=Acrylic
*Density
1190.,
*Elastic
 3.3e+09, 0.35
*Material, name=Alu
*Density
2699.,
*Elastic
 7.02e+10, 0.345
**
*Step, name=Step-2, nlgeom=NO
**
** modified Inputfile -> Export MASS and STIFFNESS matrices
**
** for export a consistent mass matrix MASS=CONSISTENT for lumped only MASS
**
*MATRIX GENERATE, STIFFNESS, MASS
**
*MATRIX OUTPUT, STIFFNESS, MASS, FORMAT=COORDINATE
**
*End Step
